L := 80*10^-3
f := 5000
R := 4000
Rn := 900
C := 0.7*10^-6
Rg := 140
i := sqrt(-1) = 1i
w := 2*π*f
XL := w*L = 2513.27
XC := 1/(w*C) = 45.4728
2.5
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A1_11 := (XC + R)/(XC + R + XC)/(XC/(XC + XC + R)) = 88.9646
A1_21 := 1/(XC/(XC + XC + R)*XC) = 1.97842
A1_12 := R*XC/(XC + R)/(XC/(XC + R)) = 4000
A1_22 := 1/(XC/(XC + R)) = 88.9646
A1_11*A1_22 - A1_12*A1_21 = 1
2.15
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A2_11 := (XL + R)/(XL + R + XL)/(XL/(XL + XL + R)) = 2.59155
A2_21 := 1/(XL/(XL + XL + R)*XL) = 0.00142903
A2_12 := R*XL/(XL + R)/(XL/(XL + R)) = 4000
A2_22 := 1/(XL/(XL + R)) = 2.59155
A2_11*A2_22 - A2_12*A2_21 = 1
"Каскадное соединение"
A_11 := A1_11*A2_11 + A1_12*A2_21 = 236.272
A_12 := A1_11*A2_12 + A1_12*A2_22 = 366225
A_21 := A1_21*A2_11 + A1_22*A2_21 = 5.25432
A_22 := A1_21*A2_12 + A1_22*A2_22 = 8144.26
A_11*A_22 - A_12*A_21 = 1
Z_C1 := sqrt(A_11*A_12/(A_21*A_22)) = 44.9672
Z_kz := A_12/A_22 = 44.9672
G_C := ln(sqrt(A_11*A_22) + sqrt(A_12*A_21)) = 7.92817
Z_xx := A_11/A_21 = 44.9673
